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# Non inverting Buck-Boost design
# 1) Specifications:
# Input voltage range:
Vimin := 5 V
Vimax := 30 V
# Nominal output voltage:
Vo := 21 V
# Output power
Po := 60 W
# Switching Frequency:
fs := 30 kHz
# Inductor current ripple:
ΔI_% := 10 %
# Capacitor voltage ripple:
ΔV_% := 1 %
# 2) Preliminar calculations:
# Duty cycle range:
Dmin := Vo/(Vimax + Vo)
Dmin = 0.411765
Dmax := Vo/(Vimin + Vo)
Dmax = 0.807692
# Output Current:
Io := Po/Vo
Io = 2.85714 A
# Absolute Inductor current ripple:
ΔI := ΔI_%*Io
ΔI = 0.285714 A
# Absolute Capacitor voltage ripple:
ΔV := ΔV_%*Vo
ΔV = 0.21 V
# 3) Inductor design:
# Inductance:
Li := Vo*(1 - Dmin)/(ΔI*fs)
Li = 1.44118 mH
# Maximum current
I_Lmax := Io + ΔI/2
I_Lmax = 3 A
# Average current:
I_Lavg := Io
I_Lavg = 2.85714 A
# RMS current:
I_Lrms := Io
I_Lrms = 2.85714 A
# 4) Capacitor design:
# Capacitância:
Co := Vo*(1 - Dmin)/(8*Li*ΔV*fs^2)
Co = 5.66893 μF
# Tensao Máxima:
V_Cmax := Vo + ΔV/2
V_Cmax = 21.105 V
# 5) Transistor maximum
# Maximum switch current:
ΔImax := (Vimax - Vo)*Dmax/(Fsw*L)
ΔImax =  # error: This variable is undefined.
# Buck Mode:
Iswmax1 := ΔImax/2 + Io
Iswmax1 =  # error
# Boost Mode:
Iswmax2 := ΔImax/2 + Io/(1 - Dmin)
Iswmax2 =  # error
